<?xml version="1.0" encoding="UTF-8"?>
<!-- Destination: Mooney-M20M/FDM/Mooney-M20M.xml -->
<!-- Minimal JSBSim placeholder config: NO external Systems/Engines/Props includes.
     Purpose: allow FlightGear to load the aircraft without quitting at splash. -->

<fdm_config version="2.0" release="ALPHA">
    <fileheader>
        <author>Philips Nguyen (aka PhilipsGamer)</author>
        <description>Mooney M20M Bravo — JSBSim FDM baseline (early development).</description>
        <note>
            Initial implementation of metrics, mass balance, aerodynamics,
            ground reactions and external forces. Parameters are provisional
            and will be refined through testing and tuning.
        </note>
    </fileheader>

    <metrics file="FDM/Config/MooneyM20M-metrics" />
    <aerodynamics file="FDM/Config/MooneyM20M-aerodynamics" />
    <ground_reactions file="FDM/Config/MooneyM20M-ground-reactions" />
    <mass_balance file="FDM/Config/MooneyM20M-mass-balance" />
    <external_reactions file="FDM/Config/MooneyM20M-external-reactions" />
    <flight_control file="FDM/Config/MooneyM20M-flight-controls" />
    <propulsion file="FDM/Config/MooneyM20M-propulsion" />
</fdm_config>
